Fs := 160 MHz
R := 50 kΩ
tf := 50 ms
C := 1 μF
Ns := Fs*tf = 8000000
B := Ns*8 = 64000000
Vpp := 1.62
V0 := 1.8/2 = 0.9
# Разброс длины линий LVDS
Vmax := V0 + Vpp/2 = 1.71
dl := 4 cm
dt := dl/c = 0.133426 ns
Fref := 200 MHz
Tdelayres := 1/(32*2*Fref) = 0.078125 ns
# ШИМ
Tdel := 5*Tdelayres = 0.390625 ns
f_cpu_x1 := 108.333 MHz
T_cpu_x1 := 1/f_cpu_x1 = 9.2308 ns
Prescaler := 7
f_timer := f_cpu_x1/Prescaler = 15.4761 MHz
Interval := 1000
F_pwm := f_timer/Interval = 15.4761 kHz
F_pwm := 1 kHz
Prescaler := f_cpu_x1/F_pwm = 108333
Fspi := f_cpu_x1/256 = 423.176 kHz
Tspi := 1/Fspi = 0.00236308 ms
# AD9854
F := 10*10^6
FTW := F*2^48/(80*10^6) = 35184372088832
20 mA*80 Ω = 1.6 V
2^48 = 281474976710656
N := 32*1024*1024
Tadc_en := N/(2*Fs) + 20 μs = 104.878 ms
# Real-Time
# Скважность
q := 0.10
# Период
T := 0.1 ms
# Длительность импульса
t := T*q = 0.01 ms
# Sample Rate
Fadc := 100 MHz
# Байт в сэмпле
Nb := 2
# Данных в импульсе, MB
S := Fadc*Nb*T*q/1024 = 1.95312
# Скорость передачи, MB/s
B := Fadc*2*q/(1024*1024) = 19.0735 1/s
